<?xml version="1.0"?>
<!--
  File:     M-14P.xml
  Author:   Aero-Matic v 0.8

  Inputs:
    name:           M14P
    type:           piston
    power:          360 hp
    augmented?      no
    injected?       no
-->

<piston_engine name="M14P">
  <minmp unit="INHG">         12.0 </minmp>
  <maxmp unit="INHG">         63.0 </maxmp>  <!--Turbocharged -->
  <displacement unit="IN3"> 621.00 </displacement>
  <maxhp>        360.00 </maxhp>
  <cycles>         2.0 </cycles>
  <idlerpm>     500.0 </idlerpm>
  <maxthrottle>    1.0 </maxthrottle>
  <minthrottle>    0.1 </minthrottle>
</piston_engine>
