<?xml version="1.0"?>
<!-- Generated by Aero-Matic v 1

     Inputs:
                horsepower: 360
                     pitch: variable
            max engine rpm: 2950
        prop diameter (ft): 8.2025

     Outputs:
              max prop rpm: 2287.47
                gear ratio:    1.29
                       Cp0: 0.040468
                       Ct0: 0.094290
       static thrust (lbs): 1475.27
-->

<propeller name="prop">
  <ixx> 5.4 </ixx>
  <diameter unit="IN"> 98.4 </diameter>
  <numblades> 3 </numblades>
  <gearratio>1.52 </gearratio>
  <minpitch> 10 </minpitch>
  <maxpitch> 45 </maxpitch>
  <minrpm>   1500 </minrpm>
  <maxrpm>   1950 </maxrpm>

  <table name="C_THRUST" type="internal">
      <tableData>
                  0       15       25       35       45
      -0.2      0.0259   0.0943   0.1155   0.1273   0.1344
       0.0      0.0000   0.0943   0.1155   0.1273   0.1356
       0.2      -0.0236   0.0814   0.1131   0.1255   0.1356
       0.4      -0.0548   0.0613   0.1120   0.1231   0.1344
       0.6      -0.0767   0.0324   0.1008   0.1179   0.1309
       0.8      -0.0767   0.0018   0.0754   0.1144   0.1262
       1.0      -0.0767   -0.0306   0.0460   0.1097   0.1197
       1.2      -0.0767   -0.0631   0.0141   0.0901   0.1155
       1.4      -0.0767   -0.0767   -0.0206   0.0649   0.1137
       1.6      -0.0767   -0.0767   -0.0524   0.0354   0.1097
       1.8      -0.0767   -0.0767   -0.0767   0.0059   0.0943
       2.0      -0.0767   -0.0767   -0.0767   -0.0236   0.0736
       2.2      -0.0767   -0.0767   -0.0767   -0.0531   0.0531
       2.4      -0.0767   -0.0767   -0.0767   -0.0767   0.0283
       2.6      -0.0767   -0.0767   -0.0767   -0.0767   0.0036
       2.8      -0.0767   -0.0767   -0.0767   -0.0767   -0.0212
       3.0      -0.0767   -0.0767   -0.0767   -0.0767   -0.0460
       3.2      -0.0767   -0.0767   -0.0767   -0.0767   -0.0707
       3.4      -0.0767   -0.0767   -0.0767   -0.0767   -0.0767
       3.6      -0.0767   -0.0767   -0.0767   -0.0767   -0.0767
       3.8      -0.0767   -0.0767   -0.0767   -0.0767   -0.0767
       4.0      -0.0767   -0.0767   -0.0767   -0.0767   -0.0767
       6.0      -0.0767   -0.0767   -0.0767   -0.0767   -0.0767
      </tableData>
  </table>

  <table name="C_POWER" type="internal">
     <tableData>
                0       15       25       35       45
      -0.2     0.0135   0.0472   0.1072   0.1849   0.2630
       0.0     0.0068   0.0405   0.1000   0.1768   0.2630
       0.2     0.0108   0.0391   0.0931   0.1692   0.2630
       0.4     0.0236   0.0337   0.0858   0.1607   0.2630
       0.6     0.0357   0.0223   0.0797   0.1505   0.2578
       0.8     0.0479   0.0068   0.0676   0.1416   0.2460
       1.0     0.0595   0.0068   0.0473   0.1335   0.2335
       1.2     0.0475   -0.0223   0.0182   0.1182   0.2238
       1.4     0.0821   -0.0336   -0.0135   0.0911   0.2205
       1.6     0.0939   -0.0393   -0.0405   0.0575   0.2145
       1.8     0.1052   -0.0405   -0.0676   0.0169   0.1902
       2.0     0.1165   -0.0518   -0.0943   -0.0202   0.1619
       2.2     0.1283   -0.0635   -0.1214   -0.0607   0.1315
       2.4     0.1396   -0.0749   -0.1485   -0.1012   0.0939
       2.6     0.1509   -0.0862   -0.1752   -0.1283   0.0393
       2.8     0.1627   -0.0979   -0.2023   -0.1538   -0.0134
       3.0     0.1740   -0.1093   -0.2295   -0.1821   -0.0607
       3.2     0.1853   -0.1206   -0.2562   -0.2092   -0.1080
       3.4     0.1971   -0.1323   -0.2833   -0.2359   -0.1550
       3.6     0.2084   -0.1437   -0.3104   -0.2630   -0.2023
       3.8     0.2197   -0.1550   -0.3359   -0.2902   -0.2497
       4.0     0.2315   -0.1667   -0.3359   -0.3359   -0.2966
       6.0     0.3359   -0.3359   -0.3359   -0.3359   -0.3359
     </tableData>
  </table>

</propeller>
