<?xml version="1.0"?>

<propeller name="3 blade variable pitch">
  <ixx> 5.6864 </ixx>
  <diameter unit="IN"> 94.5</diameter>
  <numblades>          3   </numblades>
 <!-- <gearratio>      1.208   </gearratio> -->
  <minpitch>          12   </minpitch>
  <maxpitch>          30   </maxpitch>
  <minrpm>           700   </minrpm>
  <maxrpm>          2400   </maxrpm>

  <table name="C_THRUST" type="internal">
      <tableData>

	12.0000	30.0000
0.0000	0.0365	0.0878
0.1000	0.0342	0.0878
0.2000	0.0321	0.0878
0.3000	0.0283	0.0874
0.4000	0.0239	0.0870
0.5000	0.0195	0.0860
0.6000	0.0141	0.0819
0.7000	0.0097	0.0747
0.8000	0.0022	0.0674
1.0000	-0.0069	0.0482
1.2000	-0.0178	0.0304
1.4000	-0.0279	0.0115
1.6000	-0.0397	-0.0067
1.8000	-0.0508	-0.0248
2.0000	-0.0614	-0.0438
2.2000	-0.0720	-0.0631
2.4000	-0.0825	-0.0825

      </tableData>
  </table>

  <table name="C_POWER" type="internal">
     <tableData>

	12.0000	30.0000
0.0000	0.0439	0.1039
0.1000	0.0439	0.1039
0.2000	0.0418	0.1039
0.3000	0.0398	0.1039
0.4000	0.0350	0.1039
0.5000	0.0288	0.1028
0.6000	0.0233	0.1016
0.7000	0.0137	0.0993
0.8000	0.0055	0.0947
1.0000	-0.0165	0.0773
1.2000	-0.0480	0.0520
1.4000	-0.0891	0.0260
1.6000	-0.1317	-0.0023
1.8000	-0.1756	-0.0634
2.0000	-0.2196	-0.1268
2.2000	-0.2635	-0.1902
2.4000	-0.3074	-0.2535

     </tableData>
  </table>

</propeller>
